y(x) := x
y1(x) := -7*x + 56
y2(x) := x - 8
y3(x) := -7*x + 56*2
x := 0 .. 36
k := 7
w(x) := (1 - k)/2*x + 128 + (-k - 1)/2*|x - k| + (1 + k)/2*|x - (k + 1)| + (-k - 1)/2*|x - (2*k + 1)| + (1 + k)/2*|x - (2*k + 2)| + (-k - 1)/2*|x - (3*k + 2)| + (1 + k)/2*|x - (3*k + 3)| + (-k - 1)/2*|x - (4*k + 3)| + (1 + k)/2*|x - (4*k + 4)| + (-k - 1)/2*|x - (5*k + 1)|
q(x) :=
    x if 0 ≤ x < 7
    -7*x + 56 if 7 ≤ x < 8
    x - 8 if 8 ≤ x < 15
    -7*x + 56*2 if 15 ≤ x ≤ 16
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x := 0 .. 40
q(1) = 1
w1(x) := 0/2*x + 2 + 1/2*|x - k| + (-1/2*|x - (k + 1)|) + 1/2*|x - (2*k + 1)| + (-1/2*|x - (2*k + 2)|) + 1/2*|x - (3*k + 2)| + (-1/2*|x - (3*k + 3)|) + 1/2*|x - (4*k + 1)| + (-1/2*|x - (4*k + 2)|)
q1(x) :=
    0 if 0 ≤ x < 7
    x - 7 if 7 ≤ x < 9
    0*x + 1 if 8 ≤ x < 16
    x - 14 if 15 ≤ x < 17
    0*x + 2 if 16 ≤ x < 23
    x - 21 if 23 ≤ x < 25
    0*x + 3 if 24 ≤ x < 31
    x - 26 if 30 ≤ x < 32
    0*x + 4 if 31 ≤ x < 38
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w(12) = 4
w1(12) = 1
